# OpenSim document version 40000
ScaleTool M2S_Model-scaled:
  mass: 67 [kg]
  height: -1
  age: -1
  ModelScaler:
    apply: true
    scaling_order: measurements manualScale
    marker_file: ../DATA/transformed_Statique.trc
    time_range: 0 6.09
    preserve_mass_distribution: true
    MeasurementSet:
      Measurement pelvis: apply=true
        MarkerPair: markers=(RBWT RFWT)
        MarkerPair: markers=(LFWT LBWT)
        BodyScale pelvis: axes=(X Y Z)
      Measurement shankR: apply=true
        MarkerPair: markers=(RKNI RANI)
        MarkerPair: markers=(RKNI RANE)
        BodyScale tibia_r: axes=(X Y Z)
      Measurement shankL: apply=true
        MarkerPair: markers=(LKNI LANI)
        MarkerPair: markers=(LKNI LANE)
        BodyScale tibia_l: axes=(X Y Z)
      Measurement thighR: apply=true
        MarkerPair: markers=(RFWT RKNE)
        BodyScale femur_r: axes=(X Y Z)
      Measurement thighL: apply=true
        MarkerPair: markers=(LFWT LKNE)
        BodyScale femur_l: axes=(X Y Z)
      Measurement torso: apply=true
        MarkerPair: markers=(C7 RBWT)
        MarkerPair: markers=(C7 LBWT)
        BodyScale torso: axes=(X Y Z)
      Measurement armR: apply=true
        MarkerPair: markers=(RSHO RHUM)
        BodyScale humerus_r: axes=(X Y Z)
      Measurement armL: apply=true
        MarkerPair: markers=(LSHO LHUM)
        BodyScale humerus_l: axes=(X Y Z)
      Measurement farmR: apply=true
        MarkerPair: markers=(RRAD RWRA)
        MarkerPair: markers=(RRAD RWRB)
        BodyScale ulna_r: axes=(X Y Z)
        BodyScale radius_r: axes=(X Y Z)
      Measurement farmL: apply=true
        MarkerPair: markers=(LRAD LWRA)
        MarkerPair: markers=(LRAD LWRB)
        BodyScale ulna_l: axes=(X Y Z)
        BodyScale radius_l: axes=(X Y Z)
      Measurement footR: apply=true
        MarkerPair: markers=(RHEE RTOE)
        BodyScale talus_r: axes=(X Y Z)
        BodyScale calcn_r: axes=(X Y Z)
        BodyScale toes_r: axes=(X Y Z)
      Measurement footL: apply=true
        MarkerPair: markers=(LHEE LTOE)
        BodyScale talus_l: axes=(X Y Z)
        BodyScale calcn_l: axes=(X Y Z)
        BodyScale toes_l: axes=(X Y Z)
    ScaleSet:
      Scale: scales=(1 1 1) segment=patella_r apply=true
      Scale: scales=(1 1 1) segment=patella_l apply=true
      Scale: scales=(1 1 1) segment=hand_r apply=true
      Scale: scales=(1 1 1) segment=hand_l apply=true
  MarkerPlacer:
    apply: true
    marker_file: ../DATA/transformed_Statique.trc
    time_range: 1 2
    max_marker_movement: -1
    IKTaskSet:
      IKMarkerTask STRN: apply=true weight=1
      IKMarkerTask RSHO: apply=true weight=1
      IKMarkerTask LSHO: apply=true weight=1
      IKMarkerTask C7: apply=true weight=1
      IKMarkerTask T10: apply=true weight=1
      IKMarkerTask CLAV: apply=true weight=1
      IKMarkerTask RRAD: apply=true weight=1
      IKMarkerTask RWRB: apply=true weight=1
      IKMarkerTask RWRA: apply=true weight=1
      IKMarkerTask LRAD: apply=true weight=1
      IKMarkerTask LWRB: apply=true weight=1
      IKMarkerTask LWRA: apply=true weight=1
      IKMarkerTask RFWT: apply=true weight=1
      IKMarkerTask LFWT: apply=true weight=1
      IKMarkerTask RBWT: apply=true weight=1
      IKMarkerTask LBWT: apply=true weight=1
      IKMarkerTask RKNE: apply=true weight=1
      IKMarkerTask RKFI: apply=false weight=1
      IKMarkerTask RANE: apply=true weight=1
      IKMarkerTask RANI: apply=true weight=1
      IKMarkerTask RHEE: apply=true weight=1
      IKMarkerTask RTOE: apply=true weight=1
      IKMarkerTask RTAR: apply=true weight=1
      IKMarkerTask LKNE: apply=true weight=1
      IKMarkerTask LKFI: apply=false weight=1
      IKMarkerTask LANE: apply=true weight=1
      IKMarkerTask LANI: apply=true weight=1
      IKMarkerTask LHEE: apply=true weight=1
      IKMarkerTask LTOE: apply=true weight=1
      IKMarkerTask LTAR: apply=true weight=1
      IKMarkerTask RBHD: apply=true weight=1
      IKMarkerTask LBHD: apply=true weight=1
      IKMarkerTask RFHD: apply=true weight=1
      IKMarkerTask LFHD: apply=true weight=1
      IKMarkerTask RKTE: apply=false weight=1
      IKMarkerTask RKNI: apply=true weight=1
      IKMarkerTask LKTE: apply=false weight=1
      IKMarkerTask LKNI: apply=true weight=1
      IKMarkerTask RTHI: apply=false weight=1
      IKMarkerTask LTHI: apply=false weight=1
      IKMarkerTask RHUM: apply=true weight=1
      IKMarkerTask LHUM: apply=true weight=1
      IKMarkerTask RBAC: apply=false weight=1
      IKMarkerTask RTTA: apply=false weight=1
      IKMarkerTask LTTA: apply=false weight=1
      IKMarkerTask RTARI: apply=false weight=1
      IKMarkerTask LTARI: apply=false weight=1
